# OpenSim document version 40000
ExternalLoads sit_stand_grfs:
  datafile: /Users/xabieririzar/Desktop/Life/Studium/TUM/M.Sc Robotics/Masterarbeit Harvard/Thesis/Subject testing/Subject data/subject_1/trial_2/grf_filtered.mot
  ExternalForce Right_GRF: applied_to_body=calcn_r force_expressed_in_body=ground point_expressed_in_body=ground
      force_identifier=ground_force_r_v point_identifier=ground_force_r_p torque_identifier=ground_torque_l_
  ExternalForce Left_GRF: applied_to_body=calcn_l force_expressed_in_body=ground point_expressed_in_body=ground
      force_identifier=ground_force_l_v point_identifier=ground_force_l_p torque_identifier=ground_torque_l_
  ExternalForce pelvis_force_v: applied_to_body=pelvis force_expressed_in_body=pelvis point_expressed_in_body=pelvis
      force_identifier=pelvis_force_v point_identifier=pelvis_force_p torque_identifier=pelvis_torque_
